*Heading
** Job name: exp Model name: exp
** Generated by: Abaqus/CAE 2020
*Preprint, echo=NO, model=NO, history=NO, contact=NO
**
** PARTS
**
*Part, name=ES_FACE
*Node
      1,           1.,           9., 0.00999999978
      2,           1.,           1., 0.00999999978
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*Element, type=C3D8
  1,  68, 145,   9,   1, 509, 586, 450, 442
  2, 145, 146,  10,   9, 586, 587, 451, 450
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*Nset, nset=_PICKEDSET5, internal, generate
   1,  882,    1
*Elset, elset=_PICKEDSET5, internal, generate
   1,  400,    1
** Section: Section-1-_PICKEDSET5
*Solid Section, elset=_PICKEDSET5, material=RIGID_MAT
,
*End Part
**
*Part, name=ES_WALLS
*Node
      1,           9.,           1.,           0.
      2,           1.,           1.,           0.
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*Element, type=C3D8
  1, 190,  93,  92, 145, 406, 309, 308, 361
  2, 206, 105, 104, 205, 422, 321, 320, 421
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*Nset, nset=_PICKEDSET5, internal, generate
   1,  432,    1
*Elset, elset=_PICKEDSET5, internal, generate
   1,  144,    1
** Section: Section-2-_PICKEDSET5
*Solid Section, elset=_PICKEDSET5, material=RIGID_MAT
,
*End Part
**
*Part, name=SE_SKIN
*Node
      1,           9.,           9.,           0.
      2,           9.,           1.,           0.
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*Element, type=C3D8
   1,  132,  289,    9,    1, 1826, 1983, 1703, 1695
   2,  289,  290,   10,    9, 1983, 1984, 1704, 1703
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*Nset, nset=_PICKEDSET2, internal, generate
    1,  5082,     1
*Elset, elset=_PICKEDSET2, internal, generate
    1,  3226,     1
*Orientation, name=Ori-1
          1.,           0.,           0.,           0.,           1.,           0.
3, 30.
** Section: Section-3-_PICKEDSET2
*Solid Section, elset=_PICKEDSET2, orientation=Ori-1, material=GOH
,
*End Part
**
**
** ASSEMBLY
**
*Assembly, name=Assembly
**
*Instance, name=SE_SKIN-1, part=SE_SKIN
*End Instance
**
*Instance, name=ES_WALLS-1, part=ES_WALLS
          0.,           0.,        -0.28
*End Instance
**
*Instance, name=ES_FACE-1, part=ES_FACE
          0.,           0.,        -0.29
*End Instance
**
*Node
      3,           5.,           5., -0.150000006
      4,           0.,           0.,           0.
      1,           0.,           0., -0.150000006
      2,           0.,           0., -0.100000001
*Nset, nset=SET-16, instance=ES_FACE-1, generate
 442,  882,    1
*Elset, elset=SET-16, instance=ES_FACE-1, generate
   1,  400,    1
*Nset, nset=_PICKEDSET46, internal
 3,
*Nset, nset=_PICKEDSET47, internal
 2,
*Nset, nset=_PICKEDSET49, internal
 4,
*Nset, nset=_PICKEDSET50, internal, instance=ES_WALLS-1, generate
   1,  432,    1
*Nset, nset=_PICKEDSET50, internal, instance=ES_FACE-1, generate
   1,  882,    1
*Elset, elset=_PICKEDSET50, internal, instance=ES_WALLS-1, generate
   1,  144,    1
*Elset, elset=_PICKEDSET50, internal, instance=ES_FACE-1, generate
   1,  400,    1
*Nset, nset=_PickedSet35, internal
 4,
*Elset, elset=__PICKEDSURF52_S2, internal, instance=ES_WALLS-1, generate
   1,  144,    1
*Elset, elset=__PICKEDSURF55_S1, internal, instance=SE_SKIN-1, generate
 1025,  1613,     1
*Elset, elset=__PICKEDSURF59_S1, internal, instance=SE_SKIN-1, generate
    1,  1024,     1
*Elset, elset=__PICKEDSURF59_S1, internal, instance=ES_FACE-1, generate
   1,  256,    1
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*Elset, elset=__PICKEDSURF61_S1, internal, instance=ES_FACE-1, generate
 257,  400,    1
*Elset, elset=__PICKEDSURF62_S1, internal, instance=ES_FACE-1, generate
 257,  400,    1
*Surface, type=ELEMENT, name=_PICKEDSURF52, internal
__PICKEDSURF52_S2, S2
*Surface, type=ELEMENT, name=_PICKEDSURF55, internal
__PICKEDSURF55_S1, S1
*Elset, elset=__PICKEDSURF59_S6_1, internal, instance=ES_WALLS-1
  11,  13,  16,  24,  25,  28
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*Elset, elset=__PICKEDSURF59_S4_1, internal, instance=ES_WALLS-1
  68, 114, 115, 116, 117, 120, 122, 124, 127, 129, 131, 138
*Elset, elset=__PICKEDSURF59_S3_1, internal, instance=ES_WALLS-1
  39,  42,  46,  51,  54,  58
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*Elset, elset=__PICKEDSURF59_S5_1, internal, instance=ES_WALLS-1
 112, 113, 133, 135, 136, 137, 139, 141, 142, 143
*Surface, type=ELEMENT, name=_PICKEDSURF59, internal
__PICKEDSURF59_S1, S1
__PICKEDSURF59_S6_1, S6
__PICKEDSURF59_S4_1, S4
__PICKEDSURF59_S3_1, S3
__PICKEDSURF59_S5_1, S5
*Surface, type=ELEMENT, name=_PICKEDSURF61, internal
__PICKEDSURF61_S1, S1
*Surface, type=ELEMENT, name=_PICKEDSURF62, internal
__PICKEDSURF62_S1, S1
** Constraint: RigidBody-1
*Rigid Body, ref node=_PickedSet35, elset=_PICKEDSET50
** Constraint: TIE_1-1-1
*Tie, name=TIE_1-1-1, adjust=yes
_PICKEDSURF52, _PICKEDSURF55
** Constraint: TIE_2-1-1
*Tie, name=TIE_2-1-1, adjust=yes
_PICKEDSURF61, _PICKEDSURF62
*End Assembly
**
** MATERIALS
**
*Material, name=GOH
*Anisotropic Hyperelastic, holzapfel, local direction=2
 0.005117,      2., 0.51366,  59.149, 0.27444
*Material, name=RIGID_MAT
*Density
1.,
*Elastic
 1e+12, 0.3
*Material, name=UANISO
*Anisotropic Hyperelastic, user, formulation=INVARIANT, type=INCOMPRESSIBLE, local direction=2, properties=370, moduli=INSTANTANEOUS
4.,          1.,         35.,         11.,          1.,          5.,          5.,          1.
    -0.46353,   0.0928356,     -1.3362,    0.193312,    0.357596,    0.361064,    0.226698,   -0.107212
    0.619725,   0.0257527,   0.0612909,    0.320154,    0.432683,    0.481765,    0.627572,    0.864246
   -0.371981,    0.443653,   -0.923906,   -0.588071,   -0.387286,    0.206481,    0.486713,   0.0752559
   0.0879145,   -0.595825,   0.0124559,  -0.0961229,   -0.121828,    0.537535,    0.240814,   -0.105619
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    -7.39776,          1.
**
** INTERACTION PROPERTIES
**
*Fluid Behavior, name=FLUID_PROP
*Fluid Density
1
*Fluid Bulk Modulus
 2.2e+06,
**
** INTERACTIONS
**
** Interaction: CAVITY
*Fluid Cavity, name=CAVITY, behavior=FLUID_PROP, refnode=_PICKEDSET46, surface=_PICKEDSURF59

** ----------------------------------------------------------------
**
** STEP: Step-1
**
*Step, name=Step-1, nlgeom=YES
*Static
1., 10., 0.0001, 1.
**
** BOUNDARY CONDITIONS
**
** Name: FluidCavPress-BC-1 Type: Fluid cavity pressure
*Boundary
_PICKEDSET46, 8, 8, 0.0001
**
** OUTPUT REQUESTS
**
*Restart, write, frequency=0
**
** FIELD OUTPUT: F-Output-3
**
*Output, field
*Contact Output
CDISP, CSTRESS
**
** FIELD OUTPUT: F-Output-1
**
*Node Output
CF, RF, U
**
** FIELD OUTPUT: F-Output-2
**
*Element Output, directions=YES
E, EE, LE, PE, PEEQ, PEMAG, S
**
** HISTORY OUTPUT: H-Output-1
**
*Output, history, variable=PRESELECT
*End Step
** ----------------------------------------------------------------
**
** STEP: Step-2
**
*Step, name=Step-2, nlgeom=YES
*Static
1., 10., 0.0001, 1.
**
** BOUNDARY CONDITIONS
**
** Name: FluidCavPress-BC-1 Type: Fluid cavity pressure
*Boundary, op=NEW
** Name: FluidCavPress-BC-2 Type: Fluid cavity pressure
*Boundary, op=NEW
_PICKEDSET46, 8, 8, 0.00015
**
** OUTPUT REQUESTS
**
*Restart, write, frequency=0
**
** FIELD OUTPUT: F-Output-6
**
*Output, field
*Contact Output
CDISP, CSTRESS
**
** FIELD OUTPUT: F-Output-4
**
*Node Output
CF, RF, U
**
** FIELD OUTPUT: F-Output-5
**
*Element Output, directions=YES
E, EE, LE, PE, PEEQ, PEMAG, S
**
** HISTORY OUTPUT: H-Output-2
**
*Output, history, variable=PRESELECT
*End Step
** ----------------------------------------------------------------
**
** STEP: Step-3
**
*Step, name=Step-3, nlgeom=YES
*Static
1., 10., 0.0001, 1.
**
** BOUNDARY CONDITIONS
**
** Name: Disp-BC-1 Type: Symmetry/Antisymmetry/Encastre
*Boundary, op=NEW
SET-16, ENCASTRE
** Name: FluidCavPress-BC-2 Type: Fluid cavity pressure
*Boundary, op=NEW
** Name: FluidCavPress-BC-3 Type: Fluid cavity pressure
*Boundary, op=NEW
_PICKEDSET46, 8, 8, 0.0002
**
** OUTPUT REQUESTS
**
*Restart, write, frequency=0
**
** FIELD OUTPUT: F-Output-9
**
*Output, field
*Contact Output
CDISP, CSTRESS
**
** FIELD OUTPUT: F-Output-7
**
*Node Output
CF, RF, U
**
** FIELD OUTPUT: F-Output-8
**
*Element Output, directions=YES
E, EE, LE, PE, PEEQ, PEMAG, S
**
** HISTORY OUTPUT: H-Output-3
**
*Output, history, variable=PRESELECT
*End Step
