*Heading
** Job name: she Model name: she
** Generated by: Abaqus/CAE 2020
*Preprint, echo=NO, model=NO, history=NO, contact=NO
**
** PARTS
**
*Part, name=PART-1
*Node
      1,          50.,          50.,          10.
      2,          50.,   47.0588226,          10.
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*Element, type=C3D8
  1,   73,   74,   92,   91,    1,    2,   20,   19
  2,   74,   75,   93,   92,    2,    3,   21,   20
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*Nset, nset=SET-1, generate
    1,  1296,     1
*Elset, elset=SET-1, generate
   1,  867,    1
*Orientation, name=Ori-1
          1.,           0.,           0.,           0.,           1.,           0.
3, 30.
** Section: Section-1-SET-1
*Solid Section, elset=SET-1, orientation=Ori-1, material=GOH
,
*End Part
**
**
** ASSEMBLY
**
*Assembly, name=Assembly
**
*Instance, name=PART-1-1, part=PART-1
*End Instance
**
*Nset, nset=SET-1, instance=PART-1-1
   55,   56,   57,   58,   59,   60
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*Elset, elset=SET-1, instance=PART-1-1
  35,  36,  37,  38,  39,  40
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*Nset, nset=SET-2, instance=PART-1-1, generate
   18,  1296,    18
*Elset, elset=SET-2, instance=PART-1-1, generate
  17,  867,   17
*Nset, nset=SET-3, instance=PART-1-1, generate
 1225,  1296,     1
*Elset, elset=SET-3, instance=PART-1-1, generate
 817,  867,    1
*Nset, nset=SET-4, instance=PART-1-1, generate
  1,  72,   1
*Elset, elset=SET-4, instance=PART-1-1, generate
  1,  51,   1
*Nset, nset=SET-5, instance=PART-1-1, generate
    1,  1279,    18
*Elset, elset=SET-5, instance=PART-1-1, generate
   1,  851,   17
*Nset, nset=SET-6, instance=PART-1-1, generate
 1225,  1296,     1
*Elset, elset=SET-6, instance=PART-1-1, generate
 817,  867,    1
*End Assembly
**
** MATERIALS
**
*Material, name=GOH
*Anisotropic Hyperelastic, holzapfel, local direction=2
 0.005117,      2., 0.51366,  59.149, 0.27444
*Material, name=MATERIAL-1
*Anisotropic Hyperelastic, user, formulation=INVARIANT, type=INCOMPRESSIBLE, local direction=2, properties=370, moduli=INSTANTANEOUS
4.,          1.,         35.,         11.,          1.,          5.,          5.,          1.
    -0.46353,   0.0928356,     -1.3362,    0.193312,    0.357596,    0.361064,    0.226698,   -0.107212
    0.619725,   0.0257527,   0.0612909,    0.320154,    0.432683,    0.481765,    0.627572,    0.864246
   -0.371981,    0.443653,   -0.923906,   -0.588071,   -0.387286,    0.206481,    0.486713,   0.0752559
   0.0879145,   -0.595825,   0.0124559,  -0.0961229,   -0.121828,    0.537535,    0.240814,   -0.105619
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    -7.39776,          1.
**
** BOUNDARY CONDITIONS
**
** Name: Disp-BC-1 Type: Symmetry/Antisymmetry/Encastre
*Boundary
SET-6, ENCASTRE
** ----------------------------------------------------------------
**
** STEP: Step-1
**
*Step, name=Step-1, nlgeom=YES
*Static
0.001, 0.1, 1e-06, 0.1
**
** BOUNDARY CONDITIONS
**
** Name: Disp-BC-2 Type: Displacement/Rotation
*Boundary
SET-4, 1, 1, 5.
** Name: Disp-BC-3 Type: Displacement/Rotation
*Boundary
SET-4, 2, 2, 5.
**
** OUTPUT REQUESTS
**
*Restart, write, frequency=0
**
** FIELD OUTPUT: F-Output-1
**
*Output, field, variable=PRESELECT
**
** HISTORY OUTPUT: H-Output-1
**
*Output, history, variable=PRESELECT
*End Step
